// SBML level 3 version 2
// Exported by VCell 7.3

model AtoP_Rev_Uncatalyzed_Application0()
  // model units - substance: Unit_umol, time: Unit_s, volume: Unit_l, area: Unit_dm2, length: Unit_dm, extent: Unit_umol

  // Compartments:
  compartment c0 = 5e-11 Unit_l;

  // Species:
  species A in c0 = 10;
  species P in c0 = 0;

  // Parameters:
  _F_ = 9.64853321e4 Unit_C_mol_1;
  Kf_r0 = 2 Unit_s_1;
  Kr_r0 = 4 Unit_s_1;

  // Reactions:
  r0: A -> P; (Kf_r0*A + (-(Kr_r0*P)))*c0;

  // Unit definitions:
  unit Unit_umol = 1e-6 mole;
  unit Unit_l = litre;
  unit Unit_dm2 = (0.1 metre)^2;
  unit Unit_dm = 0.1 metre;
  unit Unit_s = second;
  unit Unit_K = kelvin;
  unit Unit__1 = dimensionless;
  unit Unit_C_mol_1 = coulomb / mole;
  unit Unit_C_nmol_1 = coulomb / (1e-9 mole);
  unit Unit_molecules_pmol_1 = item / (1e-12 mole);
  unit Unit__1000000000 = 1e9 dimensionless;
  unit Unit_mV_C_K_1_mol_1 = 1e-3 volt * coulomb / (kelvin * mole);
  unit Unit_mV_V_1 = dimensionless;
  unit Unit_uM_um3_molecules_1 = 1e-6 mole * (1e-6 metre)^3 / (litre * item);
  unit Unit_s_1 = 1 / second;
end
