// SBML level 3 version 2
// Exported by VCell 7.3

model HVJ_RevKholodenko2000___Ultrasensitivity_and_negative_feedback_bring_oscillations_in_MAPK_cascade_unnamed()
  // HVJ_RevKholodenko2000 - Ultrasensitivity and negative feedback bring oscillations in MAPK cascade_unnamed
  // &lt;notes&gt; &lt;body xmlns="http://www.w3.org/1999/xhtml"&gt; &lt;div class="dc:title"&gt;Kholodenko2000 - Ultrasensitivity and negative feedback bring oscillations in MAPK cascade&lt;/div&gt; &lt;div class="dc:description"&gt; &lt;p&gt;The combination of ultrasensitivity and negative feedback bring sustained oscillations in the mitogen-activated protein kinase cascades.&lt;/p&gt; &lt;/div&gt; &lt;div class="dc:bibliographicCitation"&gt; &lt;p&gt;This model is described in the article:&lt;/p&gt; &lt;div class="bibo:title"&gt; &lt;a href="http://identifiers.org/pubmed/10712587" title="Access to this publication"&gt;Negative feedback and ultrasensitivity can bring about oscillations in the mitogen-activated protein kinase cascades.&lt;/a&gt; &lt;/div&gt; &lt;div class="bibo:authorList"&gt;Kholodenko BN&lt;/div&gt; &lt;div class="bibo:Journal"&gt;Eur. J. Biochem. 2000; 267(6):1583-8&lt;/div&gt; &lt;p&gt;Abstract:&lt;/p&gt; &lt;div class="bibo:abstract"&gt; &lt;p&gt;Functional organization of signal transduction into protein phosphorylation cascades, such as the mitogen-activated protein kinase (MAPK) cascades, greatly enhances the sensitivity of cellular targets to external stimuli. The sensitivity increases multiplicatively with the number of cascade levels, so that a tiny change in a stimulus results in a large change in the response, the phenomenon referred to as ultrasensitivity. In a variety of cell types, the MAPK cascades are imbedded in long feedback loops, positive or negative, depending on whether the terminal kinase stimulates or inhibits the activation of the initial level. Here we demonstrate that a negative feedback loop combined with intrinsic ultrasensitivity of the MAPK cascade can bring about sustained oscillations in MAPK phosphorylation. Based on recent kinetic data on the MAPK cascades, we predict that the period of oscillations can range from minutes to hours. The phosphorylation level can vary between the base level and almost 100% of the total protein. The oscillations of the phosphorylation cascades and slow protein diffusion in the cytoplasm can lead to intracellular waves of phospho-proteins.&lt;/p&gt; &lt;/div&gt; &lt;/div&gt; &lt;div class="dc:publisher"&gt; &lt;p&gt;This model is hosted on &lt;a href="http://www.ebi.ac.uk/biomodels/"&gt;BioModels Database&lt;/a&gt; and identified by: &lt;a href="http://identifiers.org/biomodels.db/BIOMD0000000010"&gt;BIOMD0000000010&lt;/a&gt; . &lt;/p&gt; &lt;p&gt;To cite BioModels Database, please use: &lt;a href="http://identifiers.org/pubmed/20587024" title="Latest BioModels Database publication"&gt;BioModels Database: An enhanced, curated and annotated resource for published quantitative kinetic models&lt;/a&gt; . &lt;/p&gt; &lt;/div&gt; &lt;div class="dc:license"&gt; &lt;p&gt;To the extent possible under law, all copyright and related or neighbouring rights to this encoded model have been dedicated to the public domain worldwide. Please refer to &lt;a href="http://creativecommons.org/publicdomain/zero/1.0/" title="Access to: CC0 1.0 Universal (CC0 1.0), Public Domain Dedication"&gt;CC0 Public Domain Dedication&lt;/a&gt; for more information. &lt;/p&gt; &lt;/div&gt; &lt;/body&gt; &lt;/notes&gt;
  // model units - substance: Unit_umol, time: Unit_s, volume: Unit_l, area: Unit_dm2, length: Unit_dm, extent: Unit_umol

  // Compartments:
  compartment uVol = 1 Unit_l;

  // Species:
  species MKKK in uVol = 0.09; MKKK is "Mos";
  species MKKK_P in uVol = 0.01; MKKK_P is "Mos-P";
  species MKK in uVol = 0.28; MKK is "Mek1";
  species MKK_P in uVol = 0.01; MKK_P is "Mek1-P";
  species MKK_PP in uVol = 0.01; MKK_PP is "Mek1-PP";
  species MAPK in uVol = 0.28; MAPK is "Erk2";
  species MAPK_P in uVol = 0.01; MAPK_P is "Erk2-P";
  species MAPK_PP in uVol = 0.01; MAPK_PP is "Erk2-PP";

  // Parameters:
  _F_ = 9.64853321e4 Unit_C_mol_1;
  K1_J0 = 10 Unit_nmol_litre_1;
  V1_J0 = 2.5 Unit_nmol_s_1_litre_1;
  Ki_J0 = 9 Unit_nmol_litre_1;
  n_J0 = 1 Unit__1;
  KK2_J1 = 8 Unit_nmol_litre_1;
  V2_J1 = 0.25 Unit_nmol_s_1_litre_1;
  KK3_J2 = 15 Unit_nmol_litre_1;
  k3_J2 = 0.025 Unit_s_1;
  KK4_J3 = 15 Unit_nmol_litre_1;
  k4_J3 = 0.025 Unit_s_1;
  KK5_J4 = 15 Unit_nmol_litre_1;
  V5_J4 = 0.75 Unit_nmol_s_1_litre_1;
  V6_J5 = 0.75 Unit_nmol_s_1_litre_1;
  KK6_J5 = 15 Unit_nmol_litre_1;
  KK7_J6 = 15 Unit_nmol_litre_1;
  k7_J6 = 0.025 Unit_s_1;
  KK8_J7 = 15 Unit_nmol_litre_1;
  k8_J7 = 0.025 Unit_s_1;
  V9_J8 = 0.5 Unit_nmol_s_1_litre_1;
  KK9_J8 = 15 Unit_nmol_litre_1;
  V10_J9 = 0.5 Unit_nmol_s_1_litre_1;
  KK10_J9 = 15 Unit_nmol_litre_1;

  // Reactions:
  J0: MKKK -> MKKK_P; MKKK*V1_J0*(1/((K1_J0 + 1000*MKKK)*(1 + (1000*MAPK_PP*(1/Ki_J0))^n_J0)))*uVol; J0 is "MAPKKK activation";  // modifiers: MAPK_PP
  J1: MKKK_P -> MKKK; MKKK_P*V2_J1*(1/(KK2_J1 + 1000*MKKK_P))*uVol; J1 is "MAPKKK inactivation";
  J2: MKK -> MKK_P; 1000*MKK*MKKK_P*k3_J2*(1/(KK3_J2 + 1000*MKK))*uVol; J2 is "phosphorylation of MAPKK";  // modifiers: MKKK_P
  J3: MKK_P -> MKK_PP; 1000*MKKK_P*MKK_P*k4_J3*(1/(KK4_J3 + 1000*MKK_P))*uVol; J3 is "phosphorylation of MAPKK-P";  // modifiers: MKKK_P
  J4: MKK_PP -> MKK_P; MKK_PP*V5_J4*(1/(KK5_J4 + 1000*MKK_PP))*uVol; J4 is "dephosphorylation of MAPKK-PP";
  J5: MKK_P -> MKK; MKK_P*V6_J5*(1/(KK6_J5 + 1000*MKK_P))*uVol; J5 is "dephosphorylation of MAPKK-P";
  J6: MAPK -> MAPK_P; 1000*MAPK*MKK_PP*k7_J6*(1/(KK7_J6 + 1000*MAPK))*uVol; J6 is "phosphorylation of MAPK";  // modifiers: MKK_PP
  J7: MAPK_P -> MAPK_PP; 1000*MAPK_P*MKK_PP*k8_J7*(1/(KK8_J7 + 1000*MAPK_P))*uVol; J7 is "phosphorylation of MAPK-P";  // modifiers: MKK_PP
  J8: MAPK_PP -> MAPK_P; MAPK_PP*V9_J8*(1/(KK9_J8 + 1000*MAPK_PP))*uVol; J8 is "dephosphorylation of MAPK-PP";
  J9: MAPK_P -> MAPK; MAPK_P*V10_J9*(1/(KK10_J9 + 1000*MAPK_P))*uVol; J9 is "dephosphorylation of MAPK-P";

  // Unit definitions:
  unit Unit_umol = 1e-6 mole;
  unit Unit_l = litre;
  unit Unit_dm2 = (0.1 metre)^2;
  unit Unit_dm = 0.1 metre;
  unit Unit_s = second;
  unit Unit_K = kelvin;
  unit Unit__1 = dimensionless;
  unit Unit_C_mol_1 = coulomb / mole;
  unit Unit_C_nmol_1 = coulomb / (1e-9 mole);
  unit Unit_molecules_pmol_1 = item / (1e-12 mole);
  unit Unit__1000000000 = 1e9 dimensionless;
  unit Unit_mV_C_K_1_mol_1 = 1e-3 volt * coulomb / (kelvin * mole);
  unit Unit_mV_V_1 = dimensionless;
  unit Unit_uM_um3_molecules_1 = 1e-6 mole * (1e-6 metre)^3 / (litre * item);
  unit Unit_nmol_litre_1 = 1e-9 mole / litre;
  unit Unit_nmol_s_1_litre_1 = 1e-9 mole / (second * litre);
  unit Unit_s_1 = 1 / second;
end
