// SBML level 3 version 2
// Exported by VCell 7.3

model NoInhib_CompInhib_SlowInhib_Application0()
  // model units - substance: Unit_umol, time: Unit_s, volume: Unit_l, area: Unit_dm2, length: Unit_dm, extent: Unit_umol

  // Compartments:
  compartment c0 = 1e-15 Unit_l;

  // Species:
  species I2 in c0 = 5;
  species E2 in c0 = 0.1;
  species C in c0 = 10;
  species E2I2 in c0 = 0;
  species E3I2 in c0 = 0;
  species E2C in c0 = 0;
  species R in c0 = 0;
  species E in c0 = 0.1;
  species A in c0 = 10;
  species EA in c0 = 0;
  species P in c0 = 0;
  species B in c0 = 10;
  species E1 in c0 = 0.1;
  species I1 in c0 = 5;
  species E1B in c0 = 0;
  species Q in c0 = 0;
  species E1I1 in c0 = 0;

  // Parameters:
  _F_ = 9.64853321e4 Unit_C_mol_1;
  Kf6_r6 = 1 Unit_l_s_1_umol_1;
  Kr6_r6 = 1 Unit_s_1;
  Kf7_r7 = 1 Unit_s_1;
  Kr7_r7 = 0 Unit_l_s_1_umol_1;
  Kf8_r8 = 1 Unit_l_s_1_umol_1;
  Kr8_r8 = 1 Unit_s_1;
  Kf9_r9 = 5 Unit_s_1;
  Kr9_r9 = 1 Unit_s_1;
  Kf1_r1 = 1 Unit_l_s_1_umol_1;
  Kr1_r1 = 1 Unit_s_1;
  Kf2_r2 = 1 Unit_s_1;
  Kr2_r2 = 0 Unit_l_s_1_umol_1;
  Kf3_r3 = 1 Unit_l_s_1_umol_1;
  Kr3_r3 = 1 Unit_s_1;
  Kf4_r4 = 1 Unit_s_1;
  Kr4_r4 = 0 Unit_l_s_1_umol_1;
  Kf5_r5 = 1 Unit_l_s_1_umol_1;
  Kr5_r5 = 1 Unit_s_1;

  // Reactions:
  r6: C + E2 -> E2C; (Kf6_r6*C*E2 + (-(Kr6_r6*E2C)))*c0;
  r7: E2C -> R + E2; (Kf7_r7*E2C + (-(Kr7_r7*R*E2)))*c0;
  r8: I2 + E2 -> E2I2; (Kf8_r8*I2*E2 + (-(Kr8_r8*E2I2)))*c0;
  r9: E2I2 -> E3I2; (Kf9_r9*E2I2 + (-(Kr9_r9*E3I2)))*c0;
  r1: A + E -> EA; (Kf1_r1*A*E + (-(Kr1_r1*EA)))*c0;
  r2: EA -> P + E; (Kf2_r2*EA + (-(Kr2_r2*P*E)))*c0;
  r3: B + E1 -> E1B; (Kf3_r3*B*E1 + (-(Kr3_r3*E1B)))*c0;
  r4: E1B -> Q + E1; (Kf4_r4*E1B + (-(Kr4_r4*Q*E1)))*c0;
  r5: I1 + E1 -> E1I1; (Kf5_r5*I1*E1 + (-(Kr5_r5*E1I1)))*c0;

  // Unit definitions:
  unit Unit_umol = 1e-6 mole;
  unit Unit_l = litre;
  unit Unit_dm2 = (0.1 metre)^2;
  unit Unit_dm = 0.1 metre;
  unit Unit_s = second;
  unit Unit_K = kelvin;
  unit Unit__1 = dimensionless;
  unit Unit_C_mol_1 = coulomb / mole;
  unit Unit_C_nmol_1 = coulomb / (1e-9 mole);
  unit Unit_molecules_pmol_1 = item / (1e-12 mole);
  unit Unit__1000000000 = 1e9 dimensionless;
  unit Unit_mV_C_K_1_mol_1 = 1e-3 volt * coulomb / (kelvin * mole);
  unit Unit_mV_V_1 = dimensionless;
  unit Unit_uM_um3_molecules_1 = 1e-6 mole * (1e-6 metre)^3 / (litre * item);
  unit Unit_l_s_1_umol_1 = litre / (second * 1e-6 mole);
  unit Unit_s_1 = 1 / second;
end
