// SBML level 3 version 1

model Waugh2006___Diabetic_Wound_Healing___TGF_B_Dynamics()
  // model units - time: time_unit

  // Compartments:
  compartment COMpartment = 1; COMpartment is "Wound";  // isVersionOf efo:0005756

  // Species:
  species $K_T in COMpartment;  // isInstanceOf BTO:0000876 GO:0035703; isVersionOf BTO:0000876
  species $T in COMpartment = 6;  // isVersionOf PR:000000046
  species $phi_I in COMpartment = 200;  // isVersionOf CL:0000863 BTO:0000801
  species $phi_R in COMpartment = 200;  // isVersionOf BTO:0000801; hasProperty ncit:C17260

  // Parameters:
  tau1 = -2.47 unit_0;
  tau2 = 21.94 unit_1;
  tau3 = 6.41 unit_2;
  tau4 = 1.75 unit_3;
  k4 = 0.07 unit_7;
  d2 = 9.1 unit_5;
  alpha = 0.8 unit_4;
  k1 = 0.05 unit_4;  // encodes ncit:C16864
  k2 = 0.693 unit_5;
  k3 = 0.002 unit_6;
  d1 = 0.2 unit_5;

  // Assignment rules:
  K_T := tau1*T^3 + tau2*T^2 + tau3*T + tau4;

  // Rate rules:
  T' = k4*phi_I - d2*T;
  phi_I' = alpha*K_T + k1*k2*phi_I*(1 - k3*(phi_I + phi_R)) - d1*phi_I;
  phi_R' = (1 - alpha)*K_T + k1*k2*phi_R*(1 - k3*(phi_I + phi_R)) - d1*phi_R;

  // Unit definitions:
  unit unit_0 = (8.64e-11 metre)^6 / (gram^3 * second); unit_0 is "8.64e-11*m^6/(g³*s)";
  unit unit_1 = (8.64e-5 metre)^3 / (gram^2 * second); unit_1 is "0.0864*mm³/(g²*s)";
  unit unit_2 = 1 / (1.15741e7 gram * second); unit_2 is "1/(11.5741*Mg*s)";
  unit unit_3 = 1 / ((0.0115741 metre)^3 * second); unit_3 is "1/(0.0115741*m³*s)";
  unit unit_4 = dimensionless^0; unit_4 is "1";
  unit unit_5 = 1 / (1.15741e-5 second); unit_5 is "1/(0.0115741*ms)";
  unit unit_6 = (1e-3 metre)^3; unit_6 is "0.001*m³";
  unit unit_7 = 0.0864 gram * (8.64e-8 dimensionless)^0 / second; unit_7 is "0.0864*µg/s";
  unit time_unit = 86400 second;
end
